**  file created by  A N S A  Wed Mar 04 13:21:33 2015
**
**  output from :
**
**  C:/Users/Gaurav/Project_01/Al_Rod.ansa
**
*Heading
** Job name: Linear_Hexa Model name: Al_Rod_1st_Hexa
** Generated by: Abaqus/CAE Student Edition 6.14-2
*Preprint, echo=NO, model=NO, history=NO, contact=NO
**
** PARTS
**
*Part, name=PART-1
*Node
  10001,           0.,  7.40254734e-07,  -1.4716583e-12
  10002,           0.,           0., -0.00499999989
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*Element, type=C3D8
100001, 10001, 10002, 10003, 10004, 10005, 10006, 10007, 10008
100002, 10005, 10006, 10007, 10008, 10009, 10010, 10011, 10012
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*Elset, elset=AL_ROD_1ST_HEXA, generate
 100001,  100400,       1
** Section: Section-1-AL_ROD_1ST_HEXA
*Solid Section, elset=AL_ROD_1ST_HEXA, material=ALUMINIUM
,
*End Part
**
**
** ASSEMBLY
**
*Assembly, name=Assembly
**
*Instance, name=PART-1-1, part=PART-1
*End Instance
**
*Nset, nset=FIXED_SURFACE, instance=PART-1-1
 10001, 10002, 10003, 10004, 10405, 10406, 10607, 10608, 10809
*Elset, elset=Set-2, instance=PART-1-1, generate
 100001,  100400,       1
*Elset, elset=_TRACTION_LOAD_S2, internal, instance=PART-1-1, generate
 100100,  100400,     100
*Surface, type=ELEMENT, name=TRACTION_LOAD
_TRACTION_LOAD_S2, S2
*End Assembly
**
** MATERIALS
**
**
** Aluminium
**
*Material, name=Aluminium
*Density
2780.,
*Elastic
 7e+10, 0.35
** ----------------------------------------------------------------
**
** STEP: Body_Force_Linear
**
*Step, name=Body_Force_Linear, nlgeom=YES, inc=1000
*Static
0.001, 1., 1e-05, 0.01
**
** BOUNDARY CONDITIONS
**
** Name: Disp-BC-1 Type: Displacement/Rotation
*Boundary
FIXED_SURFACE, 1, 1
FIXED_SURFACE, 2, 2
FIXED_SURFACE, 3, 3
FIXED_SURFACE, 4, 4
FIXED_SURFACE, 5, 5
FIXED_SURFACE, 6, 6
**
** LOADS
**
** Name: Body_Force   Type: Body force Using Field: Body_Force_SineWave
*Dload
PART-1-1.100001, BX, 156.918
PART-1-1.100002, BX, 466.891
PART-1-1.100003, BX, 765.367
PART-1-1.100004, BX, 1045.
PART-1-1.100005, BX, 1298.9
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PART-1-1.100400, BX, 156.918
** Name: Traction_Load   Type: Pressure
*Dsload
TRACTION_LOAD, P, 1e+06
**
** OUTPUT REQUESTS
**
*Restart, write, frequency=0
**
** FIELD OUTPUT: F-Output-1
**
*Output, field
*Node Output
RF, TF, U
*Element Output, directions=YES
BF, LE, PE, PEEQ, PEMAG, S, SF
**
** HISTORY OUTPUT: H-Output-1
**
*Output, history, variable=PRESELECT
*End Step
