**  file created by  A N S A  Fri Mar 06 00:55:54 2015
**
**  output from :
**
**  C:/Users/Gaurav/Project_01/Linear_Truss.ansa
**
*Heading
** Job name: Linear_Truss Model name: Linear_Truss
** Generated by: Abaqus/CAE Student Edition 6.14-2
*Preprint, echo=NO, model=NO, history=NO, contact=NO
**
** PARTS
**
*Part, name=PART-1
*Node
    502,          0.5,           0.,           0.
    503,   0.49949494,           0.,           0.
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*Element, type=T3D2
  1,  502,  503
  2,  503,  504
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*Elset, elset=ALUMINIUM_ROD_TRUSS, generate
   1,  990,    1
** Section: Section-1-ALUMINIUM_ROD_TRUSS
*Solid Section, elset=ALUMINIUM_ROD_TRUSS, material=ALUMINIUM
7.85398e-05,
*End Part
**
**
** ASSEMBLY
**
*Assembly, name=Assembly
**
*Instance, name=PART-1-1, part=PART-1
*End Instance
**
*Elset, elset=All, instance=PART-1-1, generate
   1,  990,    1
*Nset, nset=FIXED_NODE, instance=PART-1-1
 1492,
*Nset, nset=TRACTION_NODE, instance=PART-1-1
 502,
*End Assembly
**
** MATERIALS
**
**
** Aluminium
**
*Material, name=ALUMINIUM
*Density
 2.78,
*Elastic
 7e+10, 0.33
**
** BOUNDARY CONDITIONS
**
** Name: Disp-BC-1 Type: Displacement/Rotation
*Boundary
FIXED_NODE, 1, 1
FIXED_NODE, 2, 2
FIXED_NODE, 3, 3
FIXED_NODE, 4, 4
FIXED_NODE, 5, 5
FIXED_NODE, 6, 6
** ----------------------------------------------------------------
**
** STEP: Linear_Truss
**
*Step, name=Linear_Truss, nlgeom=YES, inc=1000
*Static
0.001, 1., 1e-05, 0.01
**
** LOADS
**
** Name: Body_Force   Type: Body force Using Field: Body_Force_SineWave
*Dload
PART-1-1.1, BX, 202034.
PART-1-1.2, BX, 606003.
PART-1-1.3, BX, 1.00982e+06
PART-1-1.4, BX, 1.41343e+06
PART-1-1.5, BX, 1.81664e+06
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PART-1-1.990, BX, 202018.
** Name: Traction_Compressive   Type: Concentrated force
*Cload
TRACTION_NODE, 1, -78.5398
**
** OUTPUT REQUESTS
**
*Restart, write, frequency=0
**
** FIELD OUTPUT: F-Output-1
**
*Output, field
*Node Output
RF, U
*Element Output, directions=YES
BF, E, S
**
** HISTORY OUTPUT: H-Output-1
**
*Output, history, variable=PRESELECT
*End Step
