*Heading
** Job name: Quadratic_Element Model name: Model-1
** Generated by: Abaqus/CAE Student Edition 6.14-2
*Preprint, echo=NO, model=NO, history=NO, contact=NO
**
** PARTS
**
*Part, name=Al_Rod_Qudractic
*End Part
**
**
** ASSEMBLY
**
*Assembly, name=Assembly
**
*Instance, name=Al_Rod_Qudractic-1, part=Al_Rod_Qudractic
*Node
      1,           0.,           0.
      2, 0.00105042022,           0.
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*Element, type=T2D3
  1,   1, 478,   2
  2,   2, 479,   3
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*Nset, nset=Al_Rod, generate
   1,  953,    1
*Elset, elset=Al_Rod, generate
   1,  476,    1
** Section: Al_Rod
*Solid Section, elset=Al_Rod, material=Aluminium
7.85398e-05,
*End Instance
**
*Nset, nset=Body_Force, instance=Al_Rod_Qudractic-1, generate
   1,  953,    1
*Elset, elset=Body_Force, instance=Al_Rod_Qudractic-1, generate
   1,  476,    1
*Nset, nset=Fixed_Node, instance=Al_Rod_Qudractic-1
 1,
*Nset, nset=Traction_Load, instance=Al_Rod_Qudractic-1
 477,
*End Assembly
**
** MATERIALS
**
*Material, name=Aluminium
*Density
2780.,
*Elastic
 7e+10, 0.35
** ----------------------------------------------------------------
**
** STEP: Quadratic_Truss
**
*Step, name=Quadratic_Truss, nlgeom=YES, inc=500
Qudratic_Truss_Elements_Simulation
*Static
0.001, 1., 1e-05, 0.01
**
** BOUNDARY CONDITIONS
**
** Name: Fixed_Node Type: Displacement/Rotation
*Boundary
Fixed_Node, 1, 1
Fixed_Node, 2, 2
Fixed_Node, 6, 6
**
** LOADS
**
** Name: Body_Force   Type: Body force Using Field: Body_Force_SineWave
*Dload
Al_Rod_Qudractic-1.1, BX, 420149.
Al_Rod_Qudractic-1.2, BX, 1.25999e+06
Al_Rod_Qudractic-1.3, BX, 2.09846e+06
Al_Rod_Qudractic-1.4, BX, 2.93464e+06
Al_Rod_Qudractic-1.5, BX, 3.76763e+06
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Al_Rod_Qudractic-1.476, BX, 420122.
** Name: Compressive_Load   Type: Concentrated force
*Cload
Traction_Load, 1, -78.5398
**
** OUTPUT REQUESTS
**
*Restart, write, frequency=0
**
** FIELD OUTPUT: F-Output-1
**
*Output, field
*Node Output
RF, U
*Element Output, directions=YES
BF, E, S
**
** HISTORY OUTPUT: H-Output-1
**
*Output, history, variable=PRESELECT
*End Step
