**  file created by  A N S A  Fri Apr 17 03:00:51 2015
**
**  output from :
**
**  C:/Users/Gaurav/Project_02/Geometry.ansa
**
*Heading
** Job name: Fine Model name: Geometry_Fine
** Generated by: Abaqus/CAE Student Edition 6.14-2
*Preprint, echo=NO, model=NO, history=NO, contact=NO
**
** PARTS
**
*Part, name=PART-1
*Node
      1, -0.0578222014,  -0.23811838
      2,  0.116822213,  0.224222973
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*Element, type=DC2D4
  1,    191,1000062,    192,      3
  2,    193,    934,    823,      4
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*Elset, elset=PLATE
   1,   2,   5,   6,   7,   8
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** Section: Section-1-PLATE
*Solid Section, elset=PLATE, material=MAT_01
1.,
*End Part
**
**
** ASSEMBLY
**
*Assembly, name=Assembly
**
*Instance, name=PART-1-1, part=PART-1
*End Instance
**
*Nset, nset=BOUNDARY_NODES, instance=PART-1-1
    217,    218,    219,    220,    221,    222
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*Elset, elset=_Surf-1_S1, internal, instance=PART-1-1
   1, 439, 557, 570, 751, 764
*Elset, elset=_Surf-1_S2, internal, instance=PART-1-1
  10, 431, 881
*Elset, elset=_Surf-1_S3, internal, instance=PART-1-1
 518, 803
*Elset, elset=_Surf-1_S4, internal, instance=PART-1-1
   5,   6, 435, 438, 519, 531, 583, 738, 802
*Surface, type=ELEMENT, name=Surf-1
_Surf-1_S1, S1
_Surf-1_S2, S2
_Surf-1_S4, S4
_Surf-1_S3, S3
*End Assembly
**
** MATERIALS
**
**
** Mat_01
**
*Material, name=MAT_01
*Conductivity
54.,
** ----------------------------------------------------------------
**
** STEP: Step-1
**
*Step, name=Step-1, nlgeom=NO
*Heat Transfer, steady state, deltmx=0.
0.1, 1., 1e-05, 0.2,
**
** BOUNDARY CONDITIONS
**
** Name: BC-1 Type: Temperature
*Boundary
BOUNDARY_NODES, 11, 11
**
** LOADS
**
** Name: Flux   Type: Surface heat flux Using Field: Flux
*Dflux
PART-1-1.1, S1, 210.868
PART-1-1.439, S1, 210.869
PART-1-1.557, S1, 204.584
PART-1-1.570, S1, 209.122
PART-1-1.751, S1, 209.136
PART-1-1.764, S1, 204.598
PART-1-1.10, S2, 211.684
PART-1-1.431, S2, 204.595
PART-1-1.881, S2, 211.692
PART-1-1.518, S3, 210.869
PART-1-1.803, S3, 210.868
PART-1-1.5, S4, 204.583
PART-1-1.6, S4, 207.391
PART-1-1.435, S4, 207.388
PART-1-1.438, S4, 209.126
PART-1-1.519, S4, 207.4
PART-1-1.531, S4, 209.128
PART-1-1.583, S4, 211.689
PART-1-1.738, S4, 211.692
PART-1-1.802, S4, 207.368
** Name: Source   Type: Body heat flux Using Field: Source
*Dflux
PART-1-1.1, BF, 2103.64
PART-1-1.2, BF, 2082.16
PART-1-1.5, BF, 2103.69
PART-1-1.6, BF, 2101.27
PART-1-1.7, BF, 2078.48
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PART-1-1.881, BF, 2107.67
**
** OUTPUT REQUESTS
**
*Restart, write, frequency=0
**
** FIELD OUTPUT: F-Output-1
**
*Output, field
*Node Output
NT,
*Element Output, directions=YES
HFL, TEMP
*Output, history, frequency=0
*End Step
