**  file created by  A N S A  Wed Apr 15 23:35:34 2015
**
**  output from :
**
**  C:/Users/Gaurav/Project_02/Geometry.ansa
**
*Heading
** Job name: Linear Model name: Linear
** Generated by: Abaqus/CAE Student Edition 6.14-2
*Preprint, echo=NO, model=NO, history=NO, contact=NO
**
** PARTS
**
*Part, name=PART-1
*Node
1000001, -0.885629654,  0.125715658
1000002, -0.771072209,  0.125859648
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*Element, type=DC2D4
1000001,1000264,1000238,1000076,1000074
1000002,1000074,1000072,1000265,1000264
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*Elset, elset=PLATE, generate
1000001, 1000280,       1
** Section: Section-1-PLATE
*Solid Section, elset=PLATE, material=MAT_01
,
*End Part
**
**
** ASSEMBLY
**
*Assembly, name=Assembly
**
*Instance, name=PART-1-1, part=PART-1
*End Instance
**
*Nset, nset=BOUNDARY_NODES, instance=PART-1-1
1000055,1000056,1000057,1000058,1000059,1000060
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*Elset, elset=_Flux_Area_S1, internal, instance=PART-1-1
1000047,1000257
*Elset, elset=_Flux_Area_S2, internal, instance=PART-1-1
1000092,1000109,1000162,1000179
*Elset, elset=_Flux_Area_S3, internal, instance=PART-1-1
1000022,1000039,1000232,1000249
*Elset, elset=_Flux_Area_S4, internal, instance=PART-1-1
1000117,1000187
*Surface, type=ELEMENT, name=Flux_Area
_Flux_Area_S1, S1
_Flux_Area_S2, S2
_Flux_Area_S4, S4
_Flux_Area_S3, S3
*End Assembly
**
** MATERIALS
**
**
** Mat_01
**
*Material, name=MAT_01
*Conductivity
54.,
** ----------------------------------------------------------------
**
** STEP: Linear_HT
**
*Step, name=Linear_HT, nlgeom=NO
*Heat Transfer, steady state, deltmx=0.
0.1, 1., 1e-05, 0.2,
**
** BOUNDARY CONDITIONS
**
** Name: Boundary Type: Temperature
*Boundary
BOUNDARY_NODES, 11, 11
**
** LOADS
**
** Name: Heat_Flux   Type: Surface heat flux Using Field: Flux_Field
*Dflux
PART-1-1.1000047, S1, 205.451
PART-1-1.1000257, S1, 205.451
PART-1-1.1000092, S2, 196.006
PART-1-1.1000109, S2, 196.991
PART-1-1.1000162, S2, 196.006
PART-1-1.1000179, S2, 196.991
PART-1-1.1000022, S3, 196.006
PART-1-1.1000039, S3, 196.991
PART-1-1.1000232, S3, 196.006
PART-1-1.1000249, S3, 196.991
PART-1-1.1000117, S4, 205.451
PART-1-1.1000187, S4, 205.451
** Name: Source   Type: Body heat flux Using Field: Source_Field
*Dflux
PART-1-1.1000001, BF, 1195.75
PART-1-1.1000002, BF, 1414.76
PART-1-1.1000003, BF, 1161.41
PART-1-1.1000004, BF, 1605.96
PART-1-1.1000005, BF, 1379.97
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PART-1-1.1000280, BF, 1204.42
**
** OUTPUT REQUESTS
**
*Restart, write, frequency=0
**
** FIELD OUTPUT: F-Output-1
**
*Output, field
*Node Output
NT,
*Element Output, directions=YES
HFL, TEMP
*Output, history, frequency=0
*End Step
