**  file created by  A N S A  Wed Apr 15 23:34:39 2015
**
**  output from :
**
**  C:/Users/Gaurav/Project_02/Geometry.ansa
**
*Heading
** Job name: Quadratic_Job Model name: Quadratic
** Generated by: Abaqus/CAE Student Edition 6.14-2
*Preprint, echo=NO, model=NO, history=NO, contact=NO
**
** PARTS
**
*Part, name=PART-1
*Node
2000001, -0.885629654,  0.125715658
2000002, -0.771072209,  0.125859648
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*Element, type=DC2D8
2000001,2000280,2000254,2000076,2000074,2000906,2000912,2000913,2000909
2000002,2000074,2000072,2000281,2000280,2000905,2000904,2000908,2000909
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*Elset, elset=PLATE, generate
2000001, 2000280,       1
** Section: Section-1-PLATE
*Solid Section, elset=PLATE, material=MAT_01
1.,
*End Part
**
**
** ASSEMBLY
**
*Assembly, name=Assembly
**
*Instance, name=PART-1-1, part=PART-1
*End Instance
**
*Nset, nset=BOUNDARY_NODES, instance=PART-1-1
2000055,2000056,2000057,2000058,2000059,2000060
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*Elset, elset=_Flux_S1, internal, instance=PART-1-1
2000047,2000257
*Elset, elset=_Flux_S2, internal, instance=PART-1-1
2000092,2000109,2000162,2000179
*Elset, elset=_Flux_S3, internal, instance=PART-1-1
2000022,2000039,2000232,2000249
*Elset, elset=_Flux_S4, internal, instance=PART-1-1
2000117,2000187
*Surface, type=ELEMENT, name=Flux
_Flux_S1, S1
_Flux_S2, S2
_Flux_S4, S4
_Flux_S3, S3
*End Assembly
**
** MATERIALS
**
**
** Mat_01
**
*Material, name=MAT_01
*Conductivity
54.,
** ----------------------------------------------------------------
**
** STEP: Quadratic_HT
**
*Step, name=Quadratic_HT, nlgeom=NO
*Heat Transfer, steady state, deltmx=0.
0.1, 1., 1e-05, 0.2,
**
** BOUNDARY CONDITIONS
**
** Name: Boundary Type: Temperature
*Boundary
BOUNDARY_NODES, 11, 11
**
** LOADS
**
** Name: Heat_Flux   Type: Surface heat flux Using Field: Flux_Field
*Dflux
PART-1-1.2000047, S1, 208.691
PART-1-1.2000257, S1, 208.691
PART-1-1.2000092, S2, 202.12
PART-1-1.2000109, S2, 201.872
PART-1-1.2000162, S2, 202.12
PART-1-1.2000179, S2, 201.872
PART-1-1.2000022, S3, 202.12
PART-1-1.2000039, S3, 201.872
PART-1-1.2000232, S3, 202.12
PART-1-1.2000249, S3, 201.872
PART-1-1.2000117, S4, 208.691
PART-1-1.2000187, S4, 208.691
** Name: Heat_Source   Type: Body heat flux Using Field: Source_Field
*Dflux
PART-1-1.2000001, BF, 1195.75
PART-1-1.2000002, BF, 1414.76
PART-1-1.2000003, BF, 1161.41
PART-1-1.2000004, BF, 1605.96
PART-1-1.2000005, BF, 1379.97
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PART-1-1.2000280, BF, 1204.42
**
** OUTPUT REQUESTS
**
*Restart, write, frequency=0
**
** FIELD OUTPUT: F-Output-1
**
*Output, field
*Node Output
NT,
*Element Output, directions=YES
HFL, TEMP
*Output, history, frequency=0
*End Step
