**
**
**
** file created by  A N S A  Sat Apr 18 15:52:44 2015
**
** output from :
**
** C:/Users/Gaurav/Project_03/Beam.ansa
**
*HEADING

**
**
**
*NODE
10000001,       0.9398853447281109,      -0.2169916165740941,                     -0.5
10000002,        1.129878782088899,      -0.2238190507167469,                     -0.5
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**
** SOLID ELEMENTS
**
*ELEMENT, TYPE=C3D8, ELSET=BEAM_SOLID_SECTION
10000001, 10000003, 10000015, 10000012, 10000001, 10000900, 10000890, 10000914, 10000896
10000002, 10000412, 10000470, 10000474, 10000450, 10000273, 10000333, 10000337, 10000312
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**
**
**
**
**
**
**
** SECTION DATA
**
*SOLID SECTION, ELSET=BEAM_SOLID_SECTION, MATERIAL=Al
**
** MATERIALS
**
**
**Al
**
*MATERIAL, NAME=Al
*DENSITY
                 7.85E-9,
*ELASTIC, TYPE=ISOTROPIC
                  6.9E10,                     0.34
**
**
**
**
** SURFACE DEFINITIONS
**
*SURFACE, NAME=Fix_Surface, TYPE=ELEMENT
10000002, S3
10000003, S3
10000032, S3
10000033, S3
10000034, S3
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10000412, S3
**
** SETS
**
