**
**
**
** file created by  A N S A  Mon Apr 20 15:47:44 2015
**
** output from :
**
** C:/Users/Gaurav/Project_03/Beam_Fine_2nd_Order_Coarse.ansa
**
*HEADING

**
**
**
*NODE
  100001,       0.8575708524451795,      -0.4375199845877369,                       0.
  100002,       0.8039594428268995,      -0.3750199845877369,                       0.
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**
** MEMBRANE and STRUCTURAL ELEMENTS
**
*ELEMENT, TYPE=S8R, ELSET=Beam_Surface
  100001,   100127,   108031,   100123,   100003,   100185,   100186,   100002,   100001
  100002,   100129,   100127,   100003,   100008,   100187,   100001,   100005,   100004
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**
** SOLID ELEMENTS
**
*ELEMENT, TYPE=C3D20, ELSET=BEAM_SOLID_SECTION
  100201,   100127,   100003,   100123,   108031,   101922,   102104,   101918,   101474,   100001,   100002,   100186,   100185,   102099,   102096,   102015,
  102014,   103385,   103388,   103387,   103386
  100202,   101922,   102104,   101918,   101474,   101338,   101386,   101342,   100794,   102099,   102096,   102015,   102014,   101381,   101378,   101297,
  101296,   103389,   103392,   103391,   103390
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**
**
**
**
**
**
**
** SECTION DATA
**
*SHELL SECTION, ELSET=Beam_Surface, MATERIAL=Al
                      1.,
*SOLID SECTION, ELSET=BEAM_SOLID_SECTION, MATERIAL=Al
**
** MATERIALS
**
**
**Al
**
*MATERIAL, NAME=Al
*DENSITY
                 7.85E-9,
*ELASTIC, TYPE=ISOTROPIC
                  6.9E10,                     0.34
**
**
**
**
** SETS
**
*NSET, NSET=Fixed_Support
  100792,   101472,   102697,   103377,   104034,   104038
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*NSET, NSET=Roller_Support
  100196,   100197,   100199,   100201,   100203,   100205
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