**  file created by  A N S A  Mon Apr 20 02:16:12 2015
**
**  output from :
**
**  C:/Users/Gaurav/Project_03/Beam_Fine_2nd_Order.ansa
**
*Heading
** Job name: Quadratic_Fine Model name: Beam_Fine_2nd_Order - Copy
** Generated by: Abaqus/CAE 6.13-1
*Preprint, echo=NO, model=NO, history=NO, contact=NO
**
** PARTS
**
*Part, name=Beam_Solid
*Node
20000001,   1.57698286,  0.220618352,           0.
20000002,    1.5387975,  0.260328323,           0.
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*Element, type=C3D20
20000001,20019609,20019533,20019604,20000276,20011537,20011284,20011444,20011640,20000284,20000587,20000275,20000274,20011164,20011125,20011639,
         20011638,20018978,20018979,20018980,20018981
20000002,20011537,20011284,20011444,20011640,20014706,20014453,20014613,20014809,20011164,20011125,20011639,20011638,20014333,20014294,20014808,
         20014807,20018982,20018983,20018984,20018985
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*Elset, elset=Set-1, generate
20000001, 20004160,       1
** Section: Section-1
*Solid Section, elset=Set-1, material=Al
,
*End Part
**
**
** ASSEMBLY
**
*Assembly, name=Assembly
**
*Instance, name=PART-1-1, part=Beam_Solid
*End Instance
**
*Nset, nset=FIXED_SUPPORT, instance=PART-1-1
20001355,20002715,20003981,20006254,20007614,20008660
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*Nset, nset=ROLLER_SUPPORT, instance=PART-1-1
20000598,20000600,20000601,20000603,20000605,20000607
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*Elset, elset=_Traction_Surface_S3, internal, instance=PART-1-1
20000341,20000342,20000343,20000344,20000345,20000526,20000527,20000528,20000529,20000530
*Elset, elset=_Traction_Surface_S4, internal, instance=PART-1-1
20000181,20000182,20000183,20000184,20000185,20000236
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*Elset, elset=_Traction_Surface_S5, internal, instance=PART-1-1
20000396,20000397,20000398,20000399,20000400,20000536
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*Elset, elset=_Traction_Surface_S6, internal, instance=PART-1-1
20002421,20002422,20002423,20002424,20002425,20002606,20002607,20002608,20002609,20002610
*Surface, type=ELEMENT, name=Traction_Surface
_Traction_Surface_S3, S3
_Traction_Surface_S4, S4
_Traction_Surface_S6, S6
_Traction_Surface_S5, S5
*End Assembly
**
** MATERIALS
**
*Material, name=Al
*Elastic
 6.9e+10, 0.34
** ----------------------------------------------------------------
**
** STEP: Loading
**
*Step, name=Loading, nlgeom=YES
*Static
0.001, 1., 1e-05, 0.1
**
** BOUNDARY CONDITIONS
**
** Name: Fixed_Support Type: Displacement/Rotation
*Boundary
FIXED_SUPPORT, 1, 1
FIXED_SUPPORT, 2, 2
FIXED_SUPPORT, 3, 3
FIXED_SUPPORT, 4, 4
FIXED_SUPPORT, 5, 5
FIXED_SUPPORT, 6, 6
** Name: Roller_Support Type: Displacement/Rotation
*Boundary
ROLLER_SUPPORT, 1, 1
ROLLER_SUPPORT, 3, 3
ROLLER_SUPPORT, 4, 4
ROLLER_SUPPORT, 5, 5
ROLLER_SUPPORT, 6, 6
**
** LOADS
**
** Name: Normal_Traction   Type: Pressure Using Field: Traction_Load
*Dload
PART-1-1.20000341, P3, 4.16667e+07
PART-1-1.20000342, P3, 4.16667e+07
PART-1-1.20000343, P3, 4.16667e+07
PART-1-1.20000344, P3, 4.16667e+07
PART-1-1.20000345, P3, 4.16667e+07
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PART-1-1.20002610, P6, -7.5e+07
**
** OUTPUT REQUESTS
**
*Restart, write, frequency=0
**
** FIELD OUTPUT: F-Output-1
**
*Output, field
*Node Output
RF, U
*Element Output, directions=YES
E, S
**
** HISTORY OUTPUT: H-Output-1
**
*Output, history, variable=PRESELECT
*End Step
