**  file created by  A N S A  Mon Apr 20 15:47:44 2015
**
**  output from :
**
**  C:/Users/Gaurav/Project_03/Beam_Fine_2nd_Order_Coarse.ansa
**
*Heading
** Job name: Qudratic_Coarse Model name: Beam_2nd_Order_Coarse
** Generated by: Abaqus/CAE 6.13-1
*Preprint, echo=NO, model=NO, history=NO, contact=NO
**
** PARTS
**
*Part, name=PART-1
*Node
 100001,  0.857570827, -0.437519997,           0.
 100002,  0.803959429, -0.375019997,           0.
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*Element, type=C3D20
100201, 100127, 100003, 100123, 108031, 101922, 102104, 101918, 101474, 100001, 100002, 100186, 100185, 102099, 102096, 102015,
        102014, 103385, 103388, 103387, 103386
100202, 101922, 102104, 101918, 101474, 101338, 101386, 101342, 100794, 102099, 102096, 102015, 102014, 101381, 101378, 101297,
        101296, 103389, 103392, 103391, 103390
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*Elset, elset=BEAM_SOLID_SECTION, generate
 100201,  101800,       1
** Section: Section-1-BEAM_SOLID_SECTION
*Solid Section, elset=BEAM_SOLID_SECTION, material=AL
,
*End Part
**
**
** ASSEMBLY
**
*Assembly, name=Assembly
**
*Instance, name=PART-1-1, part=PART-1
*End Instance
**
*Nset, nset=FIXED_SUPPORT, instance=PART-1-1
 100792, 101472, 102697, 103377, 104034, 104038
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*Nset, nset=ROLLER_SUPPORT, instance=PART-1-1
 100196, 100197, 100199, 100201, 100203, 100205
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*Elset, elset=_Traction_S3, internal, instance=PART-1-1
 101369, 101370, 101371, 101372, 101393, 101394, 101395, 101396
*Elset, elset=_Traction_S4, internal, instance=PART-1-1
 100577, 100578, 100579, 100580, 100597, 100598
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*Elset, elset=_Traction_S5, internal, instance=PART-1-1
 100481, 100482, 100483, 100484, 100501, 100502
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*Elset, elset=_Traction_S6, internal, instance=PART-1-1
 100569, 100570, 100571, 100572, 100593, 100594, 100595, 100596
*Surface, type=ELEMENT, name=Traction
_Traction_S3, S3
_Traction_S4, S4
_Traction_S6, S6
_Traction_S5, S5
*End Assembly
**
** MATERIALS
**
**
** Al
**
*Material, name=AL
*Density
 7.85e-09,
*Elastic
 6.9e+10, 0.34
** ----------------------------------------------------------------
**
** STEP: Loading
**
*Step, name=Loading, nlgeom=YES
*Static
0.01, 1., 1e-05, 0.15
**
** BOUNDARY CONDITIONS
**
** Name: Fixed_Support Type: Displacement/Rotation
*Boundary
FIXED_SUPPORT, 1, 1
FIXED_SUPPORT, 2, 2
FIXED_SUPPORT, 3, 3
FIXED_SUPPORT, 4, 4
FIXED_SUPPORT, 5, 5
FIXED_SUPPORT, 6, 6
** Name: Roller_Support Type: Displacement/Rotation
*Boundary
ROLLER_SUPPORT, 1, 1
ROLLER_SUPPORT, 3, 3
ROLLER_SUPPORT, 4, 4
ROLLER_SUPPORT, 5, 5
ROLLER_SUPPORT, 6, 6
**
** LOADS
**
** Name: Traction   Type: Pressure Using Field: Traction_Variation
*Dload
PART-1-1.101369, P3, -1.25e+07
PART-1-1.101370, P3, -1.25e+07
PART-1-1.101371, P3, -1.25e+07
PART-1-1.101372, P3, -1.25e+07
PART-1-1.101393, P3, -6.25e+07
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PART-1-1.100596, P6, -6.25e+07
**
** OUTPUT REQUESTS
**
*Restart, write, frequency=0
**
** FIELD OUTPUT: F-Output-1
**
*Output, field
*Node Output
RF, U
*Element Output, directions=YES
E, S
**
** HISTORY OUTPUT: H-Output-1
**
*Output, history, variable=PRESELECT
*End Step
